# Координаты левого верхнего угла области D
Xlw := 100
Ylw := 200
# Координаты правого нижнего угла области D
Xhw := 800
Yhw := 900
# Функция
f(x) := sqrt(|x|)*sin(π*x)
x1 := -6
x2 := 6
deltaX := 0.1
N := round((x2 - x1)/deltaX) = 120
i := 0 .. N
X[i] := x1 + i*deltaX
Y[i] := f(X[i])
Z[i] := 1
X = [
    -6; -5.9; -5.8; -5.7; -5.6; -5.5; -5.4; -5.3; -5.2; -5.1
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]
Y = [
    0; 0.7506; 1.41557; 1.9315; 2.25061; 2.34521; 2.21006; 1.8625; 1.34036; 0.697859
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]
# Область отображения в МСК
Xl := min(X) = -6
Xh := max(X) = 6
Yl := min(Y) = -2.34521
Yh := max(Y) = 2.34521
M := stack(transpose(X), transpose(Y), transpose(Z))
deltaXw := Xhw - Xlw = 700
deltaYw := Yhw - Ylw = 700
deltax := Xh - Xl = 12
deltay := Yh - Yl = 4.69042
ky := deltaYw/deltay = 149.241
kx := deltaXw/deltax = 58.3333
# Матрица пересчетов из МСК в ОСК
Tsw := [kx, 0, Xlw - kx*Xl; 0, -ky, Yhw + ky*Yl; 0, 0, 1]
Mw := Tsw*M
Xw := transpose(Mw)[:, 0]
Yw := transpose(Mw)[:, 1]
# График функции в МСК (слева) и в ОСК (справа)
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